# Simple rigid body system


units		lj
atom_style	full
dimension 	3
boundary	p p f
pair_style	lj/cut 4.4

variable 	sigma		equal 1.0
variable 	epsilon 	equal 1.0

read_restart	restart.dat.1500000

mass		1 1.0
group		solvent type 1

#read_data	data.vac add append

neighbor 	0.4 bin
pair_coeff	1 1 1.0 1.0
pair_modify 	shift yes

balance 	1.05 shift z 10 1.05

####################### WALLS ###########################

variable       epsilonWall equal 2*${epsilon}

variable       cutoffTop   equal   0.7147*${sigma}

variable       cutoffLow   equal   3*${sigma}

fix            topWall all wall/lj93 zhi EDGE &
               ${epsilonWall} ${sigma} ${cutoffTop} units box

fix            lowWall all wall/lj93 zlo EDGE &
               ${epsilonWall} ${sigma} ${cutoffLow} units box


######################	FIXES ############################


#fix		1 cube rigid/nvt/small molecule temp 1.0 1.0 0.25

fix 		2 solvent nve


## Thermostat


region		regthermo block EDGE EDGE EDGE EDGE 0 20

group 		thermo dynamic solvent region regthermo every 1000

fix 		3 thermo langevin 1.0 1.0 0.1 156453


## Evaporation


region		regevap	block	EDGE EDGE EDGE EDGE 140 160

fix 		evap solvent evaporate 50 1 regevap 156753


#### Load balancing

fix 		bal all balance 1000 1.05 shift z 10 1.05


############### Diagnostics and computes ###################
#compute 	com cube	  rigid/local	1 mol x y z
#compute 	quat cube	  rigid/local	1 mol quatw quati quatj quatk

thermo 		1000
thermo_style 	custom step temp epair evdwl etotal press pe ke vol

dump		1 all custom 100000 dump.lammpstrj id mol type x y z
dump 		2 all image 10000 image.*.png type type

dump_modify 	2 pad 8

dump 		3 all movie 5000 movie.avi type type
#dump 		com cube local 1000 dump.*.xyz c_com[*]
#dump		quat cube      local 1000 dump.*.quat c_quat[*]


restart 	500000 restart.dat
timestep 	0.0025
timer 		full


run		10000000
