#Read the equilibrated lj fluid and add nanocubes

units           lj
atom_style      full
atom_modify     map array first cubes
dimension       3
boundary        p p f
pair_style      lj/cut/opt 2.5

variable        sigma           equal 1.0
variable        epsilon         equal 1.0
read_restart	restart.dat.3000000

group		solvent type 1
read_data	data490_500.cubes group cubes add append

neighbor      0.4 bin
neigh_modify  exclude molecule/intra cubes delay 0 every 1 check yes


pair_modify   shift yes

pair_coeff    1 1 1.0 1.0 #solvent
pair_coeff    2 2 0.6 1.0 0.7147 #np
pair_coeff    3 3 0.0 0.0 0.0 #dummy
pair_coeff    2 3 0.0 0.0 0.0 #np dummy
pair_coeff    1 2 1.0 1.0 #np solvent
pair_coeff    1 3 0.0 0.0 2.5 #dummy solvent


# delete solvent where the cubes are
delete_atoms  overlap 1.0 solvent cubes

pair_coeff    1 1 1.0 1.0 #solvent
pair_coeff    2 2 0.6 1.0 0.7147 #np
pair_coeff    3 3 0.0 0.0 0.0 #dummy
pair_coeff    2 3 0.0 0.0 0.0 #np dummy
pair_coeff    1 2 1.0 1.0 #np solvent
pair_coeff    1 3 0.0 0.0 0.0 #dummy solvent


comm_modify   mode multi cutoff/multi 1 2.5 cutoff/multi 2 2.5 cutoff/multi 3 6.95

reset_timestep 	0

balance 	1.05 shift z 10 1.05

####################### WALLS ###########################

variable       epsilonWall equal 2*${epsilon}
variable       repulsive   equal   0.7147*${sigma}
variable       full	   equal   3*${sigma}

fix            topWall all wall/lj93 zhi EDGE &
	       ${epsilonWall} ${sigma} ${repulsive} units box
fix            lowSol solvent wall/lj93 zlo EDGE &
               ${epsilonWall} ${sigma} ${full} units box
fix 	       lowCub cubes wall/lj93 zlo EDGE &
               ${epsilonWall} ${sigma} ${repulsive} units box


###################### COMPUTES ##########################

compute        bin1 solvent chunk/atom bin/1d z upper 1.0
compute        com cubes          rigid/local   1 mol x y z
compute        quat cubes         rigid/local   1 mol quatw quati quatj quatk
compute        cc2 cubes chunk/atom molecule
compute        msd cubes msd/chunk cc2


######################  FIXES ############################


fix             peclet solvent ave/chunk 1000 1 1000 bin1 density/number norm &
                 none ave one file density.profile

fix              temp solvent ave/chunk 1000 1 1000 bin1 temp norm &
                 none ave one file temp.profile

fix             1 cubes rigid/nve/small molecule #temp ${temp} ${temp} 10

fix             2 solvent nve

## Thermostat

region          regthermo block EDGE EDGE EDGE EDGE 0 10

group           thermo dynamic solvent region regthermo every 1000

fix             3 thermo langevin ${startTemp} ${temp} 10 156453

#### Load balancing

fix             bal all balance 1000 1.05 shift z 10 1.05

############### Diagnostics  ###################

fix 		msd cubes ave/time 1000 1 1000 c_msd[*] file dump.msd ave one
fix 		msd2 cubes ave/time 10 100 1000 c_msd[*] file dump.msd2 ave one

thermo          1000
thermo_style    custom step temp epair evdwl etotal press pe ke atoms

dump            1 all custom 100000 dump.lammpstrj id mol type x y z
dump            2 all image 10000 image.*.png type type

dump_modify     2 pad 8


dump		image cubes image 10000 image_cubes.*.png type type

dump_modify	image pad 8

dump            3 all movie 5000 movie.avi type type
dump           com cubes local 10000 dump.*.xyz c_com[*]
dump           quat cubes      local 10000 dump.*.quat c_quat[*]


restart         500000 restart.dat
timestep        0.005
timer           full

run            3000000
